# Worksheet setting: ORIGIN = 1
# Лабораторна робота №6 Виконав студент групи ІС-31 Коваль Богдан
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k := 0
# Дана функція | Задаємо вузли інтерполяції
x[1] := -6 + k = -6
x[3] := -2 + k = -2
f(x) := 1/2*x*cos(x)
x[2] := -4 + k = -4
# Вектор вузлів інтр.
x[4] := 0 + k = 0
x[5] := 2 + k = 2
# Запишемо значення у вуз.
x = [-6; -4; -2; 0; 2]
f(-6) = -2.88051
f(-4) = 1.30729  # Перенесемо у векторний вигляд
f(-2) = 0.416147
f(0) = 0
f(2) = -0.416147
y := [-2.88051; 1.30729; 0.41615; 0; -0.41615]
# Запишемо межі інтерполювання
xt := -6, -4 .. 2
t := -6, -5.99 .. 2
# [plot: f(t), f(xt) vs t, xt]
# Етап №1. Перевірка отриманого з програми палінома Лагранджа
f(x) := 1/2*x*cos(x)
# Отриманий палiном Лагранджа з програми
t := -6, -5.99 .. 2
P(x) := f(-6)*(x + 4)*(x + 2)*(x - 0)*(x - 2)/384 + f(-4)*(x + 6)*(x + 2)*(x - 0)*(x - 2)/(-96) + f(-2)*(x + 6)*(x + 4)*(x - 0)*(x - 2)/64 + f(0)*(x + 6)*(x + 4)*(x + 2)*(x - 2)/(-96) + f(2)*(x + 6)*(x + 4)*(x + 2)*(x - 0)/384
# Результати палінома Лагранджа на графіку
# З графіка бачимо, що у вузлах інтерполяції графіки збігаються.
# [plot: f(t), P(t), y vs t, x]
# Для визначення похибки, знайдемо різницю від точки інтерполювання та отриманого графіка.
e_1 := |P(-6) - f(-6)| = 0
e_2 := |P(-4) - f(-4)| = 0
e_3 := |P(-2) - f(-2)| = 0
e_4 := |P(0) - f(0)| = 0
e_5 := |P(2) - f(2)| = 0
# Висновок: Результат, ми отримали в усіх точках інтегрування 0, тому обрахунок паліному Лагранжа виконаний правильно
# Етап №2: Порівняння значень із обрахунками системою MathCad
# Задамо вектори точок інтерполяції | Значення функцій у точках інтерполяції
x = [-6; -4; -2; 0; 2]
y = [-2.88051; 1.30729; 0.41615; 0; -0.41615]
# Задамо межі інтегрування
t := -6, -5.99 .. 2
# Для обрахунку системою MathCad, використаємо вбудовану функцію cspline(x, y), функція interp виконує лінійну інтерполяцію.
s := cspline(x, y)
A(t) := interp(s, x, y, t)
# Результати функцій вбудованих у MathCad на графіку
# [plot: y, f(t), A(t) vs x, t]
# Етап №3. Перевірка отриманих даних обрахування методом кубічної інтерполяції
# Випишемо кофіцієнти з програми
a := [-2.8805; 1.30728; 0.41615; 0]
b := [2.79108; 0.69954; -0.64426; -0.08345]
c := [0; -1.04577; 0.373870; -0.09347]
d := [-0.17429; 0.23661; -0.07789; 0.01558]
# Проміжок №1
x1 := -6, -5.99 .. -4
S1(x1) := a[1] + b[1]*(x1 - x[1]) + c[1]*(x1 - x[1])^2 + d[1]*(x1 - x[1])^3 → -0.17429*(x1 + 6.0)^3 + 2.79108*x1 + 13.86598
# Проміжок №2
x2 := -4, -3.99 .. -2
S2(x2) := a[2] + b[2]*(x2 - x[2]) + c[2]*(x2 - x[2])^2 + d[2]*(x2 - x[2])^3 → 0.23661*(x2 + 4.0)^3 - 1.04577*(x2 + 4.0)^2 + 0.69954*x2 + 4.10544
# Проміжок №3
x3 := -2, -1.99 .. 0
S3(x3) := a[3] + b[3]*(x3 - x[3]) + c[3]*(x3 - x[3])^2 + d[3]*(x3 - x[3])^3 → -0.07789*(x3 + 2.0)^3 + 0.37387*(x3 + 2.0)^2 - (0.64426*x3 + 0.87237)
# Проміжок №4
x4 := 0, 0.01 .. 2
S4(x4) := a[4] + b[4]*(x4 - x[4]) + c[4]*(x4 - x[4])^2 + d[4]*(x4 - x[4])^3 → 0.01558*x4^3 - 0.09347*x4^2 - 0.08345*x4
# Побудуємо графік для перевірки результатів визначення кубічних сплайнів отриманих з програми
# [plot: S1(x1), S2(x2), S3(x3), S4(x4), f(t), y vs x1, x2, x3, x4, t, x]
